ORIGIN := 1
n := 120
T := 2
h := 0.01
N := T/h
N = 200
-число*шагов
σ := 1
d := σ*sqrt(h)
d = 0.1
j := 1 .. n
ε1[:, j] := rnorm(N, 0, d)
i := 1 .. N
ε2[:, j] := rnorm(N, 0, d)
x[1, j] := 0
y[1, j] := 0
x[i + 1, j] := x[i, j] + ε1[i, j]
y[i + 1, j] := y[i, j] + ε2[i, j]
transpose(ε1) =  # no stored result
transpose(ε2) =  # no stored result
transpose(x) =  # no stored result
transpose(y) =  # no stored result
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max(x) = 4.72159
min(x) = -4.23099
max(y) = 4.62967
min(y) = -3.87218
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Var1 := sum(sum(|x[i + 1, j] - x[i, j]|, j = 1 .. n), i = 1 .. N)/n
x[121, 1] = 1.28428
y[121, 1] = 1.03833
Var2 := sum(sum(|y[i + 1, j] - y[i, j]|, j = 1 .. n), i = 1 .. N)/n
Var1 = 16.0391
y[121, 2] = 0.130106
x[121, 2] = -0.51336
Var2 = 15.9059
SqVar1 := sum(sum(|x[i + 1, j] - x[i, j]|^2, j = 1 .. n), i = 1 .. N)/n
SqVar2 := sum(sum(|y[i + 1, j] - y[i, j]|^2, j = 1 .. n), i = 1 .. N)/n
SqVar1 = 2.01168
SqVar2 = 1.9912
